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# Til dette design skal følgende parametre bestemmes: VOUT, VIN min, VIN max, Iout max, fsw, fbw
# Output voltage:
Vfb := 1.235 V
VOUT := 5 V
R2 == R1/(Vout/Vfb - 1) solve, Vout → 1.235*V*(R1/R2 + 1.0)
R2 + R1 ≤ 150*kΩ
R1 := 82 kΩ
R2 := 27 kΩ
VOUT := 1.235*V*(R1/R2 + 1.0) = 4.98574 V
# Inductor:
VIN := 7.2 V
fsw := 100 kHz
Iripple := 5%*2 A = 100 mA
L := (VIN - VOUT)*VOUT/(fsw*Iripple*VIN) = 153.329 μH
# Output capacitor C7:
ΔVt := 0.3 V
ΔIt := 1 A  # Skud fra hoften
Re_max := ΔVt/ΔIt = 0.3 Ω
Re := 0.063 Ω  # ESR
C_min := L*(ΔVt - sqrt(ΔVt^2 - (ΔIt*Re)^2))/(VOUT*Re^2) = 51.8339 μF
C_out := 100 μF
# Input capacitor:
I_load := 2 A
I_rms := I_load*sqrt(VOUT*(VIN - VOUT))/VIN = 922.947 mA
C_10 := 100 μF
C_9 := 10 μF
# Bootstrap:
Cboot := 50 nF
# Catch diode:
Iload := 2 A
I_D.avg := Iload*(1 - VOUT/(8.2 V)) = 783.966 mA
# Feedback transfer function / compensation:
fz := 1/(2*π*Re*C_10) = 25.2627 kHz
fp := 1/(20*π*VOUT/(2 A)*C_10) + 0.5/(2*π*L*fsw*C_10) = 115.744 Hz
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fn := fsw/2 = 50 kHz
B := 3.3 V/V
gm := 675*10^-6*S
# fra databladet, typical.
# 400-1000 ellers
R3 := B/gm*((R1 + R2)/R2) = 19.7366 kΩ
fp_MAX := 1000 Hz
fp_MIN := 100 Hz
C5 := 1/(2*π*fp_MAX*R3) = 8.06394 nF
C4 := 1/(2*π*fz*R3) = 319.204 pF  # Behøves måske ikke, mindsker støj
# Spole har A_L på:
